OpenVSP model (file version 5), 7 components.
Geometry view with OpenVSP parameter names; values to 6 digits, angles in degrees, lengths in the model's unit.
Overall bounding box: X_Min=0 X_Len=0.712 Y_Min=-0.425893 Y_Len=0.851787 Z_Min=-0.0219001 Z_Len=0.168325

Fuselage "fuselage"
  location (X Y Z) 0 0 0, rotation 0 0 0
  bounding box size 0.712 0.15 0.107
  Design: Length=0.712
  cross sections:
    n  XLocPercent  YLocPercent  ZLocPercent  shape
    0  0            0            0            point
    1  0.0983       0            0.0210674    super ellipse Super_Height=0.065 Super_M=2.75 Super_M_bot=2.75 Super_MaxWidthLoc=0 Super_N=1.03 Super_N_bot=2.86 Super_TopBotSym=0 Super_Width=0.089
    2  0.316        0            0.044382     super ellipse Super_Height=0.107 Super_M=3 Super_M_bot=3 Super_MaxWidthLoc=0 Super_N=0.89 Super_N_bot=1.17 Super_TopBotSym=0 Super_Width=0.118
    3  0.47         0            0.0463483    ellipse Ellipse_Height=0.1 Ellipse_Width=0.15
    4  0.6531       0            0.0348315    super ellipse Super_Height=0.082 Super_M=1.92 Super_M_bot=1.92 Super_MaxWidthLoc=0 Super_N=2.61 Super_N_bot=0.64 Super_TopBotSym=0 Super_Width=0.141
    5  0.7621       0            0.0296348    super ellipse Super_Height=0.071 Super_M=3.67 Super_M_bot=3.67 Super_MaxWidthLoc=0 Super_N=4.71 Super_N_bot=0.66 Super_TopBotSym=0 Super_Width=0.099
    6  0.8931       0            0.0280899    super ellipse Super_Height=0.059 Super_M=2.44 Super_M_bot=2.44 Super_MaxWidthLoc=0 Super_N=4.07 Super_N_bot=2 Super_TopBotSym=0 Super_Width=0.095
    7  1            0            0.0332865    super ellipse Super_Height=0.048 Super_M=1.05 Super_M_bot=1.05 Super_MaxWidthLoc=0 Super_N=3.44 Super_N_bot=6.33 Super_TopBotSym=0 Super_Width=0.045

Fuselage "fairing_aft_shoulder"
  location (X Y Z) 0.530013 0 0, rotation 0 0 0
  bounding box size 0.125027 0.149154 0.0454679
  Design: Length=0.125027
  cross sections:
    n  XLocPercent  YLocPercent  ZLocPercent  shape
    0  0            0            0.454301     point
    1  0.0398633    0            0.32233      super ellipse Super_Height=0.0329 Super_M=1.74 Super_M_bot=1.74 Super_MaxWidthLoc=-1 Super_N=2.71 Super_N_bot=2 Super_TopBotSym=0 Super_Width=0.1438
    2  0.120159     0            0.31993      super ellipse Super_Height=0.0314 Super_M=1.71 Super_M_bot=1.71 Super_MaxWidthLoc=-1 Super_N=2.52 Super_N_bot=2 Super_TopBotSym=0 Super_Width=0.149
    3  0.199886     0            0.302334     super ellipse Super_Height=0.034 Super_M=1.56 Super_M_bot=1.56 Super_MaxWidthLoc=-1 Super_N=3.31 Super_N_bot=2 Super_TopBotSym=0 Super_Width=0.1438
    4  0.280182     0            0.300735     super ellipse Super_Height=0.0325 Super_M=1.64 Super_M_bot=1.64 Super_MaxWidthLoc=-1 Super_N=2.49 Super_N_bot=2 Super_TopBotSym=0 Super_Width=0.1488
    5  0.839977     0            0.251145     super ellipse Super_Height=0.0357 Super_M=0.78 Super_M_bot=0.78 Super_MaxWidthLoc=-1 Super_N=3.61 Super_N_bot=2 Super_TopBotSym=0 Super_Width=0.1339
    6  0.960137     0            0.240748     super ellipse Super_Height=0.0375 Super_M=0.88 Super_M_bot=0.88 Super_MaxWidthLoc=-1 Super_N=2.22 Super_N_bot=2 Super_TopBotSym=0 Super_Width=0.1393
    7  1            0            0.391115     point

Wing "wing"
  location (X Y Z) 0.4071 0 0.0245, rotation 0 0 0
  symmetric about XZ
  bounding box size 0.381693 0.851787 0.0358878
  totals: TotalSpan=0.852599 TotalProjectedSpan=0.8496 TotalChord=0.200105 TotalArea=0.167116 TotalAR=4.31929 MAC=0.229248
  root: chord 0.2601, twist 1.6, NACA 4-series Camber=0.01 CamberLoc=0.2 ThickChord=0.1004
  sections:
    n   Span        Root_Chord  Tip_Chord  Area         Sweep     Sweep_Location  Dihedral   Twist     Twist_Location  tip airfoil
    1   0.0722185   0.2601      0.3818     0.0231785    -52.4606  0               -4.44732   1.41356   0.25            NACA 4-series Camber=0.01 CamberLoc=0.2 ThickChord=0.0612
    2   0.0100002   0.3818      0.3351     0.00358458   75.7236   0               0          1.38766   0.25            NACA 4-series Camber=0.01 CamberLoc=0.2 ThickChord=0.0686
    3   0.0100402   0.3351      0.288      0.00312803   66.5019   0               5.14287    1.36177   0.25            NACA 4-series Camber=0.01 CamberLoc=0.2 ThickChord=0.0785
    4   0.0150019   0.288       0.2317     0.00389824   26.5642   0               -0.763871  1.32292   0.25            NACA 4-series Camber=0.01 CamberLoc=0.2 ThickChord=0.0951
    5   0.020036    0.2317      0.2162     0.00448706   14.8422   0               3.43363    1.27114   0.25            NACA 4-series Camber=0.01 CamberLoc=0.2 ThickChord=0.0985
    6   0.200058    0.2162      0.1302     0.0346501    -3.26228  0               -1.34618   0.753236  0.25            NACA 4-series Camber=0.01 CamberLoc=0.2 ThickChord=0.1004
    7   0.0500735   0.1302      0.1248     0.00638437   -21.4049  0               -3.09093   0.623762  0.25            NACA 4-series Camber=0.01 CamberLoc=0.2 ThickChord=0.0946
    8   0.020009    0.1248      0.1012     0.00226102   35.5648   0               -1.71836   0.571973  0.25            NACA 4-series Camber=0.01 CamberLoc=0.2 ThickChord=0.1004
    9   0.0256419   0.1012      0.0436     0.00185647   63.3887   0               -12.8437   0.507236  0.25            as above
    10  0.00321999  0.0436      0.0368     0.000129443  66.4132   0               -29.7949   0.5       0.25            as above
  SS_Control "elevon": EtaStart=0.37 EtaEnd=0.97 Length_C_Start=0.195 Length_C_End=0.195 Length_Start=0.0396077 Length_End=0.0126935 LE_Flag=0 Surf_Type=2

Wing "vtailr"
  location (X Y Z) 0.5426 0.062 0.0496, rotation 51 0 0
  bounding box size 0.126866 0.08562 0.10117
  totals: TotalSpan=0.119 TotalProjectedSpan=0.119 TotalChord=0.0834065 TotalArea=0.00992537 TotalAR=1.42675 MAC=0.0856312
  root: chord 0.107, twist 0, NACA 4-series Camber=0 CamberLoc=0.2 ThickChord=0.129
  sections:
    n  Span   Root_Chord  Tip_Chord  Area        Sweep  Sweep_Location  Dihedral  Twist  Twist_Location  tip airfoil
    1  0.119  0.107       0.059813   0.00992537  29.4   0               0         0      0.25            as above

Wing "vtailr_root"
  location (X Y Z) 0.524005 0.0412324 0.0239542, rotation 51 0 0
  bounding box size 0.125595 0.0328108 0.0353982
  totals: TotalSpan=0.033 TotalProjectedSpan=0.033 TotalChord=0.113543 TotalArea=0.00374691 TotalAR=0.290639 MAC=0.113668
  root: chord 0.120085, twist 0, NACA 4-series Camber=0 CamberLoc=0.2 ThickChord=0.129
  sections:
    n  Span   Root_Chord  Tip_Chord  Area        Sweep  Sweep_Location  Dihedral  Twist  Twist_Location  tip airfoil
    1  0.033  0.120085    0.107      0.00374691  29.4   0               0         0      0.25            as above

Wing "vtaill"
  location (X Y Z) 0.5426 -0.062 0.0496, rotation 129 0 0
  bounding box size 0.126866 0.08562 0.10117
  totals: TotalSpan=0.119 TotalProjectedSpan=0.119 TotalChord=0.0834065 TotalArea=0.00992537 TotalAR=1.42675 MAC=0.0856312
  root: chord 0.107, twist 0, NACA 4-series Camber=0 CamberLoc=0.2 ThickChord=0.129
  sections:
    n  Span   Root_Chord  Tip_Chord  Area        Sweep  Sweep_Location  Dihedral  Twist  Twist_Location  tip airfoil
    1  0.119  0.107       0.059813   0.00992537  29.4   0               0         0      0.25            as above

Wing "vtaill_root"
  location (X Y Z) 0.524005 -0.0412324 0.0239542, rotation 129 0 0
  bounding box size 0.125595 0.0328108 0.0353982
  totals: TotalSpan=0.033 TotalProjectedSpan=0.033 TotalChord=0.113543 TotalArea=0.00374691 TotalAR=0.290639 MAC=0.113668
  root: chord 0.120085, twist 0, NACA 4-series Camber=0 CamberLoc=0.2 ThickChord=0.129
  sections:
    n  Span   Root_Chord  Tip_Chord  Area        Sweep  Sweep_Location  Dihedral  Twist  Twist_Location  tip airfoil
    1  0.033  0.120085    0.107      0.00374691  29.4   0               0         0      0.25            as above
