OpenVSP model (file version 5), 6 components.
Geometry view with OpenVSP parameter names; values to 6 digits, angles in degrees, lengths in the model's unit.
Overall bounding box: X_Min=0 X_Len=38.0362 Y_Min=-16.9744 Y_Len=33.9487 Z_Min=-2.655 Z_Len=10.2852

Fuselage "fuselage"
  location (X Y Z) 0 0 0, rotation 0 0 0
  bounding box size 37.49 3.95 4.14
  Design: Length=37.49
  cross sections:
    n  XLocPercent  YLocPercent  ZLocPercent  shape
    0  0            0            0            point
    1  0.08         0            0            ellipse Ellipse_Height=3.1 Ellipse_Width=2.7
    2  0.2          0            0            ellipse Ellipse_Height=4.14 Ellipse_Width=3.95
    3  0.68         0            0            ellipse Ellipse_Height=4.05 Ellipse_Width=3.9
    4  0.9          0            0.00933582   ellipse Ellipse_Height=2.8 Ellipse_Width=2.2
    5  1            0            0.0146706    point

Wing "wing"
  location (X Y Z) 10 0 -0.75, rotation 0 0 0
  symmetric about XZ
  bounding box size 9.0197 33.9487 1.83933
  totals: TotalSpan=34.07 TotalProjectedSpan=33.9404 TotalChord=3.5929 TotalArea=122.41 TotalAR=9.41057 MAC=4.17949
  root: chord 6.10849, twist 2, NACA 4-series Camber=0.02 CamberLoc=0.4 ThickChord=0.12
  sections:
    n  Span    Root_Chord  Tip_Chord  Area    Sweep  Sweep_Location  Dihedral  Twist  Twist_Location  tip airfoil
    1  17.035  6.10849     1.07731    61.205  25     0               5         -2     0.25            as above

Wing "vtailc"
  location (X Y Z) 30.6 0 0.770219, rotation 90 0 0
  bounding box size 7.43622 0.560325 6.86
  totals: TotalSpan=6.86 TotalProjectedSpan=6.86 TotalChord=3.64 TotalArea=24.9704 TotalAR=1.88462 MAC=3.99179
  root: chord 5.6, twist 0, NACA 4-series Camber=0 CamberLoc=0.2 ThickChord=0.1
  sections:
    n  Span  Root_Chord  Tip_Chord  Area     Sweep  Sweep_Location  Dihedral  Twist  Twist_Location  tip airfoil
    1  6.86  5.6         1.68       24.9704  40     0               0         0      0.25            as above

Wing "htail"
  location (X Y Z) 31.3 0 1.45, rotation 0 -2.1118 0
  symmetric about XZ
  bounding box size 4.93685 12.46 0.596439
  totals: TotalSpan=12.46 TotalProjectedSpan=12.46 TotalChord=2.739 TotalArea=34.1279 TotalAR=4.54911 MAC=2.98129
  root: chord 4.15, twist 0, NACA 4-series Camber=0 CamberLoc=0.2 ThickChord=0.1
  sections:
    n  Span  Root_Chord  Tip_Chord  Area    Sweep  Sweep_Location  Dihedral  Twist  Twist_Location  tip airfoil
    1  6.23  4.15        1.328      17.064  30     0               0         0      0.25            as above

Pod "engine_pod_l"
  location (X Y Z) 9.81 -5.2 -1.85, rotation 0 0 0
  bounding box size 3.2 1.61 1.61
  Design: FineRatio=3.97516 Length=3.2

Pod "engine_pod_r"
  location (X Y Z) 9.81 5.2 -1.85, rotation 0 0 0
  bounding box size 3.2 1.61 1.61
  Design: FineRatio=3.97516 Length=3.2
